units lj
dimension 2
boundary p p p
atom_style ls/dem
comm_modify vel yes cutoff 12.0
atom_modify map yes
newton off

region             box block -20 20 -20 20 -0.5 0.5 units box
create_box         1 box

molecule        square square.mol
create_atoms    0 random 40 534534 box mol square 51432 overlap 0.5

mass 1 1.0

group g1 molecule 1
group g2 molecule 2
group g3 molecule 3
group g4 molecule 4
group g5 molecule 5

velocity g1 set 0.01 0.03 0
velocity g2 set 0.04 0.02 0
velocity g3 set 0.0 -0.05 0
velocity g4 set -0.1 0.07 0
velocity g5 set 0.06 -0.05 0

neigh_modify   exclude molecule/intra all

fix             1 all rigid/small/ls/dem molecule
fix             2 all enforce2d


pair_style ls/dem 1.0
pair_coeff * * 1.0 0.5 0.1 0 0 0 1.0 0 0 0 0

thermo_style custom step
timestep 0.1

thermo 100
dump mydump all custom 100 atomDump_square id type mol x y vx vy fx fy

run 50000
